// COMSOL Multiphysics 6.2.0.290 model "COMSOL_verification.mph"
// Outline of the model tree

Parameters
  GP_domain_width = 200 [nm]
  GP_domain_height = 100 [nm]
  GP_membrane_height = 20 [nm]
  GP_particle_size = 30 [nm]
  PP_eps_air = 1
  PP_eps_particle = 4
  PP_eps_membrane = 4
  PP_n_air = sqrt(PP_eps_air)
  PP_n_particle = sqrt(PP_eps_particle)
  PP_n_membrane = sqrt(PP_eps_membrane)
  PP_wavelength = 35 [nm]
  MP_el_size = 1 [nm]
  PP_frequency = c_const/PP_wavelength
  PP_k = 2*pi/(PP_wavelength)
  GP_membrane_width = 200 [nm]
  GP_fR = 6*1[nm]
  test = GP_domain_width + 2*GP_fR

Variables
  var1 "Force"
    Fx = intpar(ewfd.unTx)
    Fy = intpar(ewfd.unTy)
    Fz = intpar(ewfd.unTz)
    Fy2 = intpar2(ewfd.unTy)
  var2 "Force hand-coded"
    Hx = ewfd.Hx  // Magnetic field, x-component
    Hy = ewfd.Hy  // Magnetic field, y-component
    Hz = ewfd.Hz  // Magnetic field, z-component
    Elx = ewfd.Ex  // Electric field, x-component
    Ely = ewfd.Ey
    Elz = ewfd.Ez
    E2 = Elx*conj(Elx) + Ely*conj(Ely) + Elz*conj(Elz)
    H2 = Hx*conj(Hx) + Hy*conj(Hy) + Hz*conj(Hz)
    eps0 = epsilon0_const
    mu0 = mu0_const
    Ex2 = Elx*conj(Elx)
    Ey2 = Ely*conj(Ely)
    Ez2 = Elz*conj(Elz)
    Hx2 = Hx*conj(Hx)
    Hy2 = Hy*conj(Hy)
    Hz2 = Hz*conj(Hz)
    Txx = 0.5*real(eps0*(Ex2-0.5*E2)+mu0*(Hx2-0.5*H2))
    Tyy = 0.5*real(eps0*(Ey2-0.5*E2)+mu0*(Hy2-0.5*H2))
    Tzz = 0.5*real(eps0*(Ez2-0.5*E2)+mu0*(Hz2-0.5*H2))
    Txy = 0.5*real(eps0*Elx*conj(Ely)+mu0*Hx*conj(Hy))
    Tyx = 0.5*real(eps0*Ely*conj(Elx)+mu0*Hy*conj(Hx))
    Txz = 0.5*real(eps0*Elx*conj(Elz)+mu0*Hx*conj(Hz))
    Tzx = 0.5*real(eps0*Elz*conj(Elx)+mu0*Hz*conj(Hx))
    Tyz = 0.5*real(eps0*Ely*conj(Elz)+mu0*Hy*conj(Hz))
    Tzy = 0.5*real(eps0*Elz*conj(Ely)+mu0*Hz*conj(Hy))
    intFx = Txx*ewfd.nx + Tyx*ewfd.ny + Txz*ewfd.nz
    intFy = Txy*ewfd.nx + Tyy*ewfd.ny + Tyz*ewfd.nz
    Fx_an = intpar(intFx)
    Fy_an = intpar(intFy)
  var3 "Force hand-coded volume"
    Hx_v = ewfd.Hx  // Magnetic field, x-component
    Hy_v = ewfd.Hy  // Magnetic field, y-component
    Hz_v = ewfd.Hz  // Magnetic field, z-component
    Elx_v = ewfd.Ex  // Electric field, x-component
    Ely_v = ewfd.Ey
    Elz_v = ewfd.Ez
    E2_v = Elx_v*conj(Elx_v) + Ely_v*conj(Ely_v) + Elz_v*conj(Elz_v)
    H2_v = Hx_v*conj(Hx_v) + Hy_v*conj(Hy_v) + Hz_v*conj(Hz_v)
    Ex2_v = Elx_v*conj(Elx_v)
    Ey2_v = Ely_v*conj(Ely_v)
    Ez2_v = Elz_v*conj(Elz_v)
    Hx2_v = Hx_v*conj(Hx_v)
    Hy2_v = Hy_v*conj(Hy_v)
    Hz2_v = Hz_v*conj(Hz_v)
    Txx_v = 0.5*real(eps0*(Ex2_v-0.5*E2_v)+mu0*(Hx2_v-0.5*H2_v))
    Tyy_v = 0.5*real(eps0*(Ey2_v-0.5*E2_v)+mu0*(Hy2_v-0.5*H2_v))
    Tzz_v = 0.5*real(eps0*(Ez2_v-0.5*E2_v)+mu0*(Hz2_v-0.5*H2_v))
    Txy_v = 0.5*real(eps0*Elx_v*conj(Ely_v)+mu0*Hx_v*conj(Hy_v))
    Tyx_v = 0.5*real(eps0*Ely_v*conj(Elx_v)+mu0*Hy_v*conj(Hx_v))
    Txz_v = 0.5*real(eps0*Elx_v*conj(Elz_v)+mu0*Hx_v*conj(Hz_v))
    Tzx_v = 0.5*real(eps0*Elz_v*conj(Elx_v)+mu0*Hz_v*conj(Hx_v))
    Tyz_v = 0.5*real(eps0*Ely_v*conj(Elz_v)+mu0*Hy_v*conj(Hz_v))
    Tzy_v = 0.5*real(eps0*Elz_v*conj(Ely_v)+mu0*Hz_v*conj(Hy_v))
    intFx_vol = d(Txx_v,x) + d(Txy_v,y) + d(Txz_v,z)
    intFy_vol = d(Tyx_v,x) + d(Tyy_v,y) + d(Tyz_v,z)
    Fx_an_vol = intparvol(intFx_vol)
    Fy_an_vol = intparvol(intFy_vol)

Couplings
  intop1: Integration "Integration over particle" on boundaries 25-27, 30, 39, 43, 51, 52 | opname = intpar
  intop3: Integration "Integration over particle 1" on boundaries 25-27, 30, 39, 43, 51, 52 | opname = intpar2
  intop2: Integration "Volume integration over particle" on domains 12, 13, 18, 19 | opname = intparvol
  maxop1: Maximum on domains 1-28

Geometry
  geom1 "Geometry 1" (2D, length unit m)
    r1: Rectangle "Domain" | base = center; size = {GP_domain_width, GP_domain_height}
    r4: Rectangle "Domain 1" | base = center; size = {GP_domain_width + 2*GP_fR, GP_domain_height + 2*GP_fR}
    r2: Rectangle "Membrane"
      pos = {0, -0.5*GP_domain_height + 0.5*GP_membrane_height}
      base = center
      size = {GP_domain_width, GP_membrane_height}
    sq1: Square "Particle" | base = center; size = GP_particle_size
    r3: Rectangle "Particle - mesh aux" | base = center; size = {GP_particle_size, GP_domain_height+ 2*GP_fR}
    r5: Rectangle "Particle - mesh aux 1" | base = center; size = {GP_domain_width + 2*GP_fR, GP_domain_height}
    r6: Rectangle "Particle - mesh aux 1.1" | base = center; size = {GP_domain_width, GP_domain_height+2*GP_fR}
    r7: Rectangle "Particle - mesh aux 2" | base = center; size = {GP_particle_size, GP_domain_height+ 2*GP_fR}
    sq2: Square "Particle 1" (disabled) | base = center; size = GP_particle_size*4
    pt1: Point | p = {, 0}
    ls1: LineSegment
      specify1 = coord
      coord1 = {-0.5*GP_domain_width, 0}
      specify2 = coord
      coord2 = {0.5*GP_domain_width, 0}
    ls2: LineSegment
      specify1 = coord
      coord1 = {0, -0.5*GP_domain_height}
      specify2 = coord
      coord2 = {0, 0.5*GP_domain_height}
    fin: Finalize "Form Union"

Materials
  mat1: Common "Membrane" on domains 5-7, 10-14, 16-20, 22-24
    RefractiveIndex
      n = PP_n_membrane
      ki = 0
  mat2: Common "Air" on domains 1-4, 6-9, 11-15, 17-21, 23-28
    RefractiveIndex
      n = PP_n_air
      ki = 0
  mat3: Common "Particle" on domains 12, 13, 18, 19
    RefractiveIndex
      n = PP_n_particle
      ki = 0

Physics
  ewfd: ElectromagneticWavesFrequencyDomain on all domains
    dependent variable E = {Ex, Ey, Ez}
    ShapeProperty.order_electricfield = 3
    ShapeProperty.valueType = complex
    components.components = outofplane
    wee1: WaveEquationElectric (default)
    pec1: PerfectElectricConductor (default)
    init1: init "Initial Values 1" (default)
    sctr1: Scattering "Scattering Boundary Condition 1" on boundaries 1, 3, 5, 7, 10-12, 14, 17, 18, 22, 32, 33, 35, 44, 48, 56, 57, 60, 62, 63, 66-69
      IncidentField = NoIncidentField
    sctr2: Scattering "Input plane wave" on boundaries 2, 9, 20, 46, 59
      IncidentField = EField
      E0i = {0, 0, 1}
      kdir = {0, -ewfd.ny, 0}
    weak1: WeakContribution (disabled) on points 22
      integrationOrder = 4
      quadratureFrame = spatial
      weakExpression = ewfd.testdepEz
      automaticQuadrature = 1
    efb1: ElectricField (disabled) on boundaries 7, 11, 18, 22, 33, 35, 48, 57, 66 | E0 = {0, 0, 1}

Mesh
  mesh1 "Mesh 1"
    size: MeshSizeDefault | hmax = 1.42E-8; hmin = 6.36E-11; hcurve = 0.3; hgrad = 1.3
    ftri1: FreeTri "Free Triangular 1" (disabled) on remaining entities
      size1: Size on entire geometry | hmax = MP_el_size; hmin = MP_el_size; custom = on
    map1: Map "Mapped 1" on entire geometry
      size1: Size on domains 1-28 | hmax = MP_el_size; hmin = MP_el_size; custom = on

Studies
  std1 "Metalens example"
    freq: Frequency "Frequency Domain" | punit = Hz; plist = PP_frequency

Solver configurations
  sol1 "Solution 1" (study std1)
    v1: Variables "Dependent Variables 1"
    s1: Stationary "Stationary Solver 1" | stol = 0.01; linpmethod = sol
      p1: Parametric | pname = freq; plistarr = PP_frequency; punit = Hz; pcontinuationmode = no
      fc1: FullyCoupled | linsolver = d1
      d1: Direct "Suggested Direct Solver (ewfd)"

Datasets
  dset1: Solution | solution = sol1

Derived values
  gev1: EvalGlobal "Global Evaluation 1" | data = dset1; table = tbl1; expr = maxop1(ewfd.Hx)

Tables
  tbl1: Table
    // Global Evaluation 1
    freq (Hz) | Maximum 1 (A/m)
    8.5655e+15 | 0.00834668

Plots
  pg9: PlotGroup2D "Material distribution" | data = dset1
    surf1: Surface | expr = ewfd.epsrAv; descr = Relative permittivity, average
  pg1: PlotGroup2D "Electric Field (ewfd)" | data = dset1
    surf1: Surface | expr = maxop1(ewfd.Hx); unit = A/m
  pg2: PlotGroup2D "MST - Fx" | data = dset1
    surf1: Surface | expr = Fx
  pg5: PlotGroup2D "MST - Fx analytical" | data = dset1
    surf1: Surface | expr = Fx_an
  pg7: PlotGroup2D "MST - Fx analytical volume" | data = dset1
    surf1: Surface | expr = Fx_an_vol
  pg3: PlotGroup2D "MST - Fy" | data = dset1
    surf3: Surface | expr = Fy
  pg6: PlotGroup2D "MST - Fy analytical" | data = dset1
    surf3: Surface | expr = Fy_an
  pg8: PlotGroup2D "MST - Fy analytical volume" | data = dset1
    surf3: Surface | expr = Fy_an_vol
  pg4: PlotGroup2D "MST - Fz" | data = dset1
    surf3: Surface | expr = Fz
  pg10: PlotGroup1D "normals" | data = dset1
    lngr1: LineGraph on boundaries 26, 30, 39, 43, 51, 52 | expr = ewfd.ny
  pg11: PlotGroup2D "2D Plot Group 11" on boundaries 26, 30, 39, 43, 51, 52 | data = dset1
    arwl1: ArrowLine | expr = {ewfd.nx, ewfd.ny}